Дано
U := 220 V
f := 60 Hz
C1 := 1 μF
# Угловая частота
w := 2*π*f = 376.991 1/s
Импеданс
Z := -1i/(w*C1) = -2652.58i Ω
Ток
I0 := U/Z = 0.082938i A
# Действительное значение
I(wt) := I0*cos(wt) - I0*1i*sin(wt)
I(wt) → 0.0829380460548i*A*cos(wt) + 0.0829380460548*A*sin(wt)
# Действующее (эффективное) значение
Iэфф := 0.83 A/sqrt(2) = 0.586899 A
