Дано
U := 220 V
f := 60 Hz
C1 := 1 μF
# Угловая частота
w := 2*π*f = 376.991 1/s
Импеданс
Z := -1i/(w*C1) = -2652.58i Ω
# Эффективное напряжение
Uэфф := U/sqrt(2) = 155.563 V
# Мнимый импеданс - ток опережает напряжение на 90 градусов.
# Если фазу не учитывать, то
Zc := 1/(w*C1)
Ток
Iэфф := Uэфф/Zc = 0.0586461 A
