Дано
f := 50 Hz
U := 220 V
C1 := 1 μF
R1 := 1 kΩ
# Угловая частота
w := 2*π*f = 314.159 1/s
# Эффективное напряжение
Uэфф := U/sqrt(2) = 155.563 V
Импеданс
Z := R1 + (-1i/(w*C1)) = (1000 - 3183.1i) Ω
Ток
I := Uэфф/Z = (0.0139743 + 0.0444816i) A
# Комплексная мощность
M := Uэфф*I = (2.17389 + 6.91971i) W
# Активная мощность:
P := Re(M) = 2.17389 W
# Реактивная мощность:
Q := Im(M) = 6.91971 W
# Полная мощность:
S := |M| = 7.25315 W
# Коэффициент мощности:
P/S = 0.299717
