Дано
Uвх := 1 V
Uвых := Uвх*0.7 = 0.7 V
Rн := 100 kΩ
f := 50 Hz
R := Rн/100 = 1000 Ω  # должно быть в 100 раз меньше нагрузки
# из (4)
C := 1/(2*π*R*f) = 3.1831e-6 F
# Проверим. Построим АЧХ
# ====================
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# Импеданс резистора Z2= R, конденсатора Z1=-i/2πfC, из делителя Uвых=Uвх*Z2/(Z1+Z2)
# Общее сопротивление - это сумма рективного, полностью
# мнимого сопротивления конденсатора (мнимое, потому что
# смещена фаза) и активного, полностью действительного
# сопротивления резистора. Это и есть модуль комплексного
# сопротивления.
# Для графика определяю как функцию Uвых(частота)
Uout(fin) := |Uвх*R/(R + 1i/(2*π*fin*C))|
Uвх*R/(R + 1i/(2*π*f*C)) = (0.5 - 0.5i) V
fin := 0 Hz, 1 Hz .. 1000 Hz
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Uout(50 Hz) = 0.707107 V
