Дано
Uвх := 1 V
Uвых := Uвх*0.7 = 0.7 V
Rн := 100 kΩ
f := 50 Hz
R := Rн/100 = 1000 Ω  # должно быть в 100 раз меньше нагрузки
# из (4)
C := 1/(2*π*R*f) = 3.1831e-6 F
Uout(fin) := |Uвх*1i/(2*π*fin*C)/(R + 1i/(2*π*fin*C))|
fin := 0 Hz, 1 Hz .. 1000 Hz
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